OpenVSP model (file version 4), 6 components.
Geometry view with OpenVSP parameter names; values to 6 digits, angles in degrees, lengths in the model's unit.
Overall bounding box: X_Min=0 X_Len=44.6721 Y_Min=-36.623 Y_Len=73.246 Z_Min=-2.41944 Z_Len=11.6194

Wing "Wing Group Parent"
  location (X Y Z) 17 0 1.2, rotation 0 0 0
  symmetric about XZ
  bounding box size 9.61545 73.246 1.19874
  totals: TotalSpan=73.246 TotalProjectedSpan=73.246 TotalChord=6.82631 TotalArea=500 TotalAR=10.73
  root: chord 9.61452, twist 0, NACA 4-series Camber=0.0216818 CamberLoc=0.409091 ThickChord=0.122727
  sections:
    n  Span    Root_Chord  Tip_Chord  Area  Sweep  Sweep_Location  Dihedral  Twist  Twist_Location  tip airfoil
    1  36.623  9.61452     4.0381     250   0      0.5             0         0      0.25            NACA 4-series Camber=0 CamberLoc=0.2 ThickChord=0.1

Wing "Horizontal Tail", child of "Wing Group Parent"
  location (X Y Z) 36 0 1.2, rotation 0 0 0
  symmetric about XZ
  bounding box size 5.15898 20 0.633349
  totals: TotalSpan=20 TotalProjectedSpan=20 TotalChord=3.66288 TotalArea=73.2576 TotalAR=5.46019
  root: chord 5.15898, twist 0, NACA 4-series Camber=0 CamberLoc=0.2 ThickChord=0.122727
  sections:
    n  Span  Root_Chord  Tip_Chord  Area     Sweep  Sweep_Location  Dihedral  Twist  Twist_Location  tip airfoil
    1  10    5.15898     2.16677    36.6288  0      0.5             0         0      0.25            NACA 4-series Camber=0 CamberLoc=0.2 ThickChord=0.1

Wing "Vertical Tail", child of "Wing Group Parent"
  location (X Y Z) 37 0 1.2, rotation 90 0 0
  bounding box size 7.67208 0.582772 8
  totals: TotalSpan=8 TotalProjectedSpan=8 TotalChord=3.5 TotalArea=28 TotalAR=2.28571
  root: chord 4.92958, twist 0, NACA 4-series Camber=0 CamberLoc=0.2 ThickChord=0.118182
  sections:
    n  Span  Root_Chord  Tip_Chord  Area  Sweep  Sweep_Location  Dihedral  Twist  Twist_Location  tip airfoil
    1  8     4.92958     2.07042    28    35     0               0         0      0.25            NACA 4-series Camber=0 CamberLoc=0.2 ThickChord=0.1

Ellipsoid "PW617F Nacelle", child of "Wing Group Parent"
  location (X Y Z) 18 3 0.1, rotation 0 0 0
  symmetric about XZ
  bounding box size 4.125 7.46 1.46
  Design: A_Radius=2.0625 B_Radius=0.73 C_Radius=0.73

Fuselage "Fuselage"
  location (X Y Z) 0 0 0, rotation 0 0 0
  bounding box size 43 4.2113 4.5317
  Design: Length=43
  cross sections:
    n  XLocPercent  YLocPercent  ZLocPercent  shape
    0  0            0            -0.0232558   point
    1  0.179348     0            0            rounded rectangle RoundRectXSec_Radius=1 RoundedRect_Height=4 RoundedRect_Width=4
    2  0.419468     0            0            rounded rectangle RoundRectXSec_Radius=1 RoundRect_Keystone=0.55 RoundedRect_Height=4 RoundedRect_Width=4
    3  0.813953     0            0            rounded rectangle RoundRectXSec_Radius=1 RoundRect_Keystone=0.45 RoundedRect_Height=4 RoundedRect_Width=4
    4  1            0            0.0151163    point

Wing "Strut", child of "Fuselage"
  location (X Y Z) 20 1.8 -1.4, rotation 20 0 0
  symmetric about XZ
  bounding box size 2 17.7638 2.77025
  totals: TotalSpan=15 TotalProjectedSpan=15 TotalChord=2 TotalArea=30 TotalAR=7.5
  root: chord 2, twist 0, NACA 4-series Camber=0 CamberLoc=0.2 ThickChord=0.118182
  sections:
    n  Span  Root_Chord  Tip_Chord  Area  Sweep  Sweep_Location  Dihedral  Twist  Twist_Location  tip airfoil
    1  7.5   2           2          15    0      0               0         0      0.25            NACA 4-series Camber=0 CamberLoc=0.2 ThickChord=0.1
